OpenVSP model (file version 5), 8 components.
Geometry view with OpenVSP parameter names; values to 6 digits, angles in degrees, lengths in the model's unit.
Overall bounding box: X_Min=-15.5 X_Len=20.5 Y_Min=-22.5599 Y_Len=45.1197 Z_Min=-1.03833 Z_Len=6.42456

Fuselage "FuselageBase"
  location (X Y Z) -5 0 0, rotation 0 0 0
  bounding box size 10.0667 3.22159 4.03833
  Design: Length=10
  cross sections:
    n  XLocPercent  YLocPercent  ZLocPercent  shape
    0  0            0            -0.02174     point
    1  0            0            -0.02174     ellipse Ellipse_Height=0.4 Ellipse_Width=0.4
    2  0            0            0.1          edit curve Width=0 Height=4 AbsoluteFlag=0 SymType=1 cubic Bezier points (X Y): 0 0, 0 -0.276142, 0 -0.5, 0 -0.5, 0 -0.5, 0 -0.276142, 0 0, 0 0.276142, 0 0.5, 0 0.5, 0 0.5, 0 0.276142, 0 0
    3  0.3          0            0.1          edit curve Width=3.22159 Height=4 AbsoluteFlag=0 SymType=1 cubic Bezier points (X Y): 0.5 -0.3, 0.4 -0.45, 0.16 -0.5, 0 -0.5, -0.16 -0.5, -0.4 -0.45, -0.5 -0.3, -0.5 0.275958, -0.275958 0.5, 0 0.5, 0.275958 0.5, 0.5 0.275958, 0.5 -0.3
    4  0.5          0            0.1          as above
    5  0.65         0            0.1          edit curve Width=3.22159 Height=4 AbsoluteFlag=0 SymType=1 cubic Bezier points (X Y): 0.46 -0.3, 0.46 -0.45, 0.16 -0.5, 0 -0.5, -0.16 -0.5, -0.46 -0.45, -0.46 -0.3, -0.46 0.275958, -0.275958 0.4, 0 0.4, 0.275958 0.4, 0.46 0.275958, 0.46 -0.3
    6  1            0            0            point

Fuselage "TailFuselage", child of "FuselageBase"
  location (X Y Z) -15 0 -0.4, rotation 0 0 0
  bounding box size 15.5833 2.4 0.765165
  Design: Length=15
  cross sections:
    n  XLocPercent  YLocPercent  ZLocPercent  shape
    0  0            0            0            point
    1  0            0            0            ellipse Ellipse_Height=0.1 Ellipse_Width=0.5
    2  0.2          0            0            ellipse Ellipse_Height=0.5 Ellipse_Width=0.5
    3  0.6          0            0            edit curve Width=3 Height=1 AbsoluteFlag=0 SymType=1 cubic Bezier points (X Y): 0.4 0, 0.4 -0.275958, 0.2 -0.5, 0 -0.5, -0.2 -0.5, -0.4 -0.275958, -0.4 0, -0.4 0.2, -0.2 0.2, 0 0.2, 0.2 0.2, 0.4 0.2, 0.4 0
    4  0.875        0            0            as above
    5  1            0            0            as above
    6  1            0            0            point

Wing "TailMain", child of "TailFuselage"
  location (X Y Z) -12 0 -0.4, rotation -180 0 -180; relative location -12 0 -0.4, rotation 0 180 0
  symmetric about XZ
  bounding box size 3.5 10 0.350136
  totals: TotalSpan=10 TotalProjectedSpan=10 TotalChord=3.25 TotalArea=32.5 TotalAR=3.07692
  root: chord 3.5, twist 0, NACA 4-series Camber=0 CamberLoc=0.2 ThickChord=0.1
  sections:
    n  Span  Root_Chord  Tip_Chord  Area   Sweep  Sweep_Location  Dihedral  Twist  Twist_Location  tip airfoil
    1  5     3.5         3          16.25  0      0               0         0      0.25            as above

Wing "WingGeom", child of "TailMain"
  location (X Y Z) -12 5 -0.4, rotation -90 0 -180; relative location -12 5 -0.4, rotation 90 180 0
  symmetric about XZ
  bounding box size 3 10.3001 2.2
  totals: TotalSpan=4.4 TotalProjectedSpan=4.4 TotalChord=2.2875 TotalArea=10.95 TotalAR=1.76804
  root: chord 3, twist 0, NACA 4-series Camber=0 CamberLoc=0.2 ThickChord=0.1
  sections:
    n  Span  Root_Chord  Tip_Chord  Area   Sweep  Sweep_Location  Dihedral  Twist  Twist_Location  tip airfoil
    1  1     3           2.9        2.95   0      0               0         0      0.25            as above
    2  0.5   2.9         2.5        1.35   4      0               0         0      0.25            as above
    3  0.3   2.5         2          0.675  10     0               0         0      0.25            as above
    4  0.4   2           0.5        0.5    30     0               0         0      0.25            as above

Fuselage "MotorFuselage", child of "FuselageBase"
  location (X Y Z) -5 0 2.7, rotation 0 0 0
  bounding box size 2.58333 0.5 0.5
  Design: Length=2.5
  cross sections:
    n  XLocPercent  YLocPercent  ZLocPercent  shape
    0  0            0            0            point
    1  0            0            0            circle Circle_Diameter=0.5
    2  0.5          0            0            as above
    3  1            0            0            as above
    4  1            0            0            point

Propeller "Prop", child of "MotorFuselage"
  location (X Y Z) -5.2 0 2.7, rotation 0 0 0
  bounding box size 0.264374 4.69256 5.37245
  Design: Diameter=6 NumBlade=3 Beta34=-20 UseBeta34Flag=1 Feather=-40 Rotate=0 ReverseFlag=0 FoldAngle=0 PropMode=0 AF=151.538 CLi=0.538798 Chord=0.177656 Solidity=0.169649 ConstructXoC=0.5 FeatherAxisXoC=0.5 FeatherOffsetXoC=0
  cross sections:
    n  RadiusFrac  shape
    0  0.2         ellipse Ellipse_Height=0.12 Ellipse_Width=0.24
    1  0.4         NACA 16-series Chord=0.49875 IdealCl=0.7 ThickChord=0.144074
    2  1           NACA 16-series Chord=0.39 IdealCl=0.2 ThickChord=0.03
  Chord along r/R (cubic Bezier): 0.2: 0.08, 0.333333: 0.15, 0.466667: 0.2, 0.6: 0.2, 0.716667: 0.2, 0.833333: 0.2, 0.95: 0.2, 0.966667: 0.2, 0.983333: 0.2, 1: 0.13
  Twist along r/R (PCHIP): 0.2: 46.75, 0.75: 20, 1: 13
  Thick along r/R (cubic Bezier): 0.2: 0.5, 0.233333: 0.3, 0.266667: 0.225, 0.3: 0.2, 0.4: 0.125, 0.5: 0.115, 0.6: 0.1, 0.733333: 0.075, 0.866667: 0.055, 1: 0.03
  CLI along r/R (cubic Bezier): 0.2: 0, 0.266667: 0.7, 0.333333: 0.7, 0.4: 0.7, 0.466667: 0.7, 0.533333: 0.7, 0.6: 0.7, 0.733333: 0.7, 0.866667: 0.7, 1: 0.2

Human "Pilot", child of "FuselageBase"
  location (X Y Z) 1 0 0.2, rotation 0 -45 180
  Anthropometric: Age=30 BMI=27.7 BMI_pct=0.5 GenderFlag=0 LenUnit=4 Mass=188.306 MassUnit=3 SitFrac=0.6 Stature=5.76115 Stature_pct=0.5

Wing "WingGeom"
  location (X Y Z) -0.7 0.654216 -0.6, rotation -180 0 -180
  symmetric about XZ
  bounding box size 4.79038 45.1197 1.07958
  totals: TotalSpan=43.8503 TotalProjectedSpan=43.8113 TotalChord=1.69289 TotalArea=79.3218 TotalAR=24.198
  root: chord 4.78842, twist 0, NACA 4-series Camber=0 CamberLoc=0.2 Invert=1 ThickChord=0.1
  sections:
    n   Span     Root_Chord  Tip_Chord  Area      Sweep    Sweep_Location  Dihedral  Twist  Twist_Location  tip airfoil
    1   1.05902  4.78842     3.17704    4.21778   0        0               -2.27818  0      0.25            CST airfoil ContLERad=1 LowDegree=7 ThickChord=0.1 UpDegree=7 Au=[0.170988 0.157287 0.162312 0.143623 0.149218 0.137218 0.140721 0.141105] Al=[-0.170988 -0.157287 -0.162312 -0.143623 -0.149218 -0.137218 -0.140721 -0.141105]
    2   1.09955  3.17704     2.42459    3.07964   0        0               -2.13429  0      0.25            as above
    3   4.79344  2.42459     2.1459     10.9542   0        0               -1.36691  0      0.25            as above
    4   7.38524  2.1459      1.47705    13.3782   2.44444  0               -1.89448  0      0.25            as above
    5   2.09016  1.47705     1.30983    2.91252   5.15152  0               -2.13429  0      0.25            as above
    6   1.09955  1.30983     1.17049    1.36362   8.26263  0               -1.99041  0      0.25            as above
    7   1.09955  1.17049     1.05059    1.22109   8.74747  0               -2.23022  0      0.25            as above
    8   1.09955  1.05059     0.954568   1.10238   11.1414  0               -1.65468  0      0.25            as above
    9   1.09955  0.954568    0.714708   0.917728  21       0               -3.90887  0      0.25            as above
    10  1.09955  0.714708    0.21991    0.513831  35       0               -6.25899  0      0.25            as above
